# OpenSim document version 30000
InverseKinematicsTool:
  results_directory: ./
  constraint_weight: Inf
  accuracy: 1e-5
  marker_file: ../../OSIM_Data/RC17/TRHOP/TRHOP_L1.trc
  time_range: 0 2.896
  report_errors: true
  report_marker_locations: false
  IKTaskSet:
    IKMarkerTask RASI: apply=true weight=2
    IKMarkerTask LASI: apply=true weight=2
    IKMarkerTask CLAV: apply=true weight=1
    IKMarkerTask RSHO: apply=true weight=1
    IKMarkerTask LSHO: apply=true weight=1
    IKMarkerTask RKNE: apply=true weight=1
    IKMarkerTask RKNEmed: apply=true weight=1
    IKMarkerTask RTHI: apply=true weight=2
    IKMarkerTask RTHI2: apply=true weight=2
    IKMarkerTask RTHI3: apply=true weight=2
    IKMarkerTask RANK: apply=true weight=1
    IKMarkerTask RANKmed: apply=true weight=1
    IKMarkerTask RTIB: apply=true weight=2
    IKMarkerTask RTIB2: apply=true weight=2
    IKMarkerTask RTIB3: apply=true weight=2
    IKMarkerTask RMT1: apply=true weight=2
    IKMarkerTask RHEE: apply=true weight=2
    IKMarkerTask RMT5: apply=true weight=2
    IKMarkerTask LKNE: apply=false weight=0
    IKMarkerTask LKNEmed: apply=false weight=0
    IKMarkerTask LTHI: apply=true weight=2
    IKMarkerTask LTHI2: apply=true weight=2
    IKMarkerTask LTHI3: apply=true weight=2
    IKMarkerTask LANK: apply=true weight=2
    IKMarkerTask LANKmed: apply=true weight=2
    IKMarkerTask LTIB: apply=true weight=2
    IKMarkerTask LTIB2: apply=true weight=2
    IKMarkerTask LTIB3: apply=true weight=2
    IKMarkerTask LMT1: apply=true weight=2
    IKMarkerTask LHEE: apply=true weight=2
    IKMarkerTask LMT5: apply=true weight=2
    IKMarkerTask RPSI: apply=true weight=1
    IKMarkerTask LPSI: apply=true weight=1
    IKMarkerTask SACR: apply=true weight=1
    IKMarkerTask C7: apply=true weight=1
    IKMarkerTask T2: apply=true weight=1
    IKMarkerTask RBAK: apply=true weight=1
    IKMarkerTask LFHD: apply=true weight=1
    IKMarkerTask RFHD: apply=false weight=0
    IKMarkerTask LBHD: apply=false weight=0
    IKMarkerTask RBHD: apply=false weight=0
    IKMarkerTask STRN: apply=true weight=1
    IKMarkerTask LHJC: apply=false weight=0
    IKMarkerTask RHJC: apply=false weight=0
    IKMarkerTask LKJC: apply=false weight=0
    IKMarkerTask RKJC: apply=false weight=0
    IKMarkerTask LAJC: apply=false weight=0
    IKMarkerTask RAJC: apply=false weight=0
