# OpenSim document version 30000
AnalyzeTool Walk_1:
  replace_force_set: false
  results_directory: C:\Users\u0093377\Documents\MovementDataProcessing\OpenSim\Example\Results
  output_precision: 8
  initial_time: 0.5
  final_time: 2.5
  solve_for_equilibrium_for_auxiliary_states: false
  maximum_number_of_integrator_steps: 20000
  maximum_integrator_step_size: 1
  minimum_integrator_step_size: 1e-8
  integrator_error_tolerance: 1e-5
  external_loads_file: C:\Users\u0093377\Documents\MovementDataProcessing\OpenSim\Example\SetUp\Walk_1_ExternalLoads.xml
  coordinates_file: C:\Users\u0093377\Documents\MovementDataProcessing\OpenSim\Example\Results\Walk_1_IK.mot
  lowpass_cutoff_frequency_for_coordinates: 6
  AnalysisSet Analyses:
    JointReaction: start_time=0.64 end_time=1.78 step_interval=1 in_degrees=true
        forces_file=C:\Users\u0093377\Documents\MovementDataProcessing\OpenSim\Example\Results\Walk_1_StaticOptimization_force.sto
        joint_names=ALL apply_on_bodies=child express_in_frame=child
