# OpenSim document version 30000
AnalyzeTool scaled_model:
  replace_force_set: false
  results_directory: ../../OpenSim/RC17
  output_precision: 8
  initial_time: 0
  final_time: 2.896
  solve_for_equilibrium_for_auxiliary_states: false
  maximum_number_of_integrator_steps: 20000
  maximum_integrator_step_size: 1
  minimum_integrator_step_size: 1e-8
  integrator_error_tolerance: 1e-5
  lowpass_cutoff_frequency_for_coordinates: 6
  AnalysisSet Analyses:
    MuscleAnalysis: start_time=0 end_time=2.896 step_interval=1 in_degrees=true muscle_list=all
        moment_arm_coordinate_list=all compute_moments=true
