# OpenSim document version 30000
ForceSet Reserve_Actuators_DC_MW:
  # Actuators on the base segment are called Residual actuators
  # whose forces account for the errors in the model, its kinematic
  # that do not balance with experimental ground reaction forces
  PointActuator FX: body=pelvis point=(-0.0707 0 0) point_is_global=false direction=(1 0 0) force_is_global=true
      optimal_force=100
  PointActuator FY: body=pelvis point=(-0.0707 0 0) point_is_global=false direction=(0 1 0) force_is_global=true
      optimal_force=200
  PointActuator FZ: body=pelvis point=(-0.0707 0 0) point_is_global=false direction=(0 0 1) force_is_global=true
      optimal_force=100
  TorqueActuator MX: bodyA=pelvis bodyB=ground torque_is_global=true axis=(1 0 0) optimal_force=80
  TorqueActuator MY: bodyA=pelvis bodyB=ground torque_is_global=true axis=(0 1 0) optimal_force=80
  TorqueActuator MZ: bodyA=pelvis bodyB=ground torque_is_global=true axis=(0 0 1) optimal_force=80
  # Actuators on the Coordinates are called Reserve actuators
  # and are used the drive the model when the model excludes its muscles (i.e. RRA)
  # or when muscles are insufficient to track desired kinematics (CMC)
  CoordinateActuator pelvis_tilt: coordinate=pelvis_tilt optimal_force=100
  CoordinateActuator pelvis_list: coordinate=pelvis_list optimal_force=100
  CoordinateActuator pelvis_rotation: coordinate=pelvis_rotation optimal_force=100
  CoordinateActuator pelvis_tx: coordinate=pelvis_tx optimal_force=100
  CoordinateActuator pelvis_ty: coordinate=pelvis_ty optimal_force=100
  CoordinateActuator pelvis_tz: coordinate=pelvis_tz optimal_force=100
  CoordinateActuator hip_flexion_r: coordinate=hip_flexion_r optimal_force=1
  CoordinateActuator hip_adduction_r: coordinate=hip_adduction_r optimal_force=1
  CoordinateActuator hip_rotation_r: coordinate=hip_rotation_r optimal_force=1
  CoordinateActuator knee_angle_r: coordinate=knee_angle_r optimal_force=1
  CoordinateActuator knee_vv_r: coordinate=knee_vv_r optimal_force=1
  CoordinateActuator knee_rot_r: coordinate=knee_rot_r optimal_force=1
  CoordinateActuator ankle_angle_r: coordinate=ankle_angle_r optimal_force=1
  CoordinateActuator subtalar_angle_r: coordinate=subtalar_angle_r optimal_force=1
  CoordinateActuator mtp_angle_r: coordinate=mtp_angle_r optimal_force=1
  CoordinateActuator hip_flexion_l: coordinate=hip_flexion_l optimal_force=1
  CoordinateActuator hip_adduction_l: coordinate=hip_adduction_l optimal_force=1
  CoordinateActuator hip_rotation_l: coordinate=hip_rotation_l optimal_force=1
  CoordinateActuator knee_angle_l: coordinate=knee_angle_l optimal_force=1
  CoordinateActuator knee_vv_l: coordinate=knee_vv_l optimal_force=1
  CoordinateActuator knee_rot_l: coordinate=knee_rot_l optimal_force=1
  CoordinateActuator ankle_angle_l: coordinate=ankle_angle_l optimal_force=1
  CoordinateActuator subtalar_angle_l: coordinate=subtalar_angle_l optimal_force=1
  CoordinateActuator mtp_angle_l: coordinate=mtp_angle_l optimal_force=1
  CoordinateActuator lumbar_extension: coordinate=lumbar_extension optimal_force=100
  CoordinateActuator lumbar_bending: coordinate=lumbar_bending optimal_force=100
  CoordinateActuator lumbar_rotation: coordinate=lumbar_rotation optimal_force=100
  CoordinateActuator arm_flex_r: coordinate=arm_flex_r optimal_force=100
  CoordinateActuator arm_add_r: coordinate=arm_add_r optimal_force=100
  CoordinateActuator arm_rot_r: coordinate=arm_rot_r optimal_force=100
  CoordinateActuator elbow_flex_r: coordinate=elbow_flex_r optimal_force=100
  CoordinateActuator pro_sup_r: coordinate=pro_sup_r optimal_force=100
  CoordinateActuator arm_flex_l: coordinate=arm_flex_l optimal_force=100
  CoordinateActuator arm_add_l: coordinate=arm_add_l optimal_force=100
  CoordinateActuator arm_rot_l: coordinate=arm_rot_l optimal_force=100
  CoordinateActuator elbow_flex_l: coordinate=elbow_flex_l optimal_force=100
  CoordinateActuator pro_sup_l: coordinate=pro_sup_l optimal_force=100
