# OpenSim document version 40000
ScaleTool Catelli_high_hip_flexion_v4.0_spheres-scaled:
  mass: 75.337 [kg]
  height: -1
  age: -1
  ModelScaler:
    apply: true
    scaling_order: manualScale
    time_range: -1 -1
    preserve_mass_distribution: true
    ScaleSet:
      Scale: scales=(1.1 1.1 1.1) segment=pelvis apply=true
      Scale: scales=(1.1 1.1 1.1) segment=femur_r apply=true
      Scale: scales=(1.1 1.1 1.1) segment=tibia_r apply=true
      Scale: scales=(1.1 1.1 1.1) segment=patella_r apply=true
      Scale: scales=(1.1 1.1 1.1) segment=talus_r apply=true
      Scale: scales=(1.1 1.1 1.1) segment=calcn_r apply=true
      Scale: scales=(1.1 1.1 1.1) segment=toes_r apply=true
      Scale: scales=(1.1 1.1 1.1) segment=femur_l apply=true
      Scale: scales=(1.1 1.1 1.1) segment=tibia_l apply=true
      Scale: scales=(1.1 1.1 1.1) segment=patella_l apply=true
      Scale: scales=(1.1 1.1 1.1) segment=talus_l apply=true
      Scale: scales=(1.1 1.1 1.1) segment=calcn_l apply=true
      Scale: scales=(1.1 1.1 1.1) segment=toes_l apply=true
      Scale: scales=(1.1 1.1 1.1) segment=torso apply=true
      Scale: scales=(1.1 1.1 1.1) segment=humerus_r apply=true
      Scale: scales=(1.1 1.1 1.1) segment=ulna_r apply=true
      Scale: scales=(1.1 1.1 1.1) segment=radius_r apply=true
      Scale: scales=(1.1 1.1 1.1) segment=hand_r apply=true
      Scale: scales=(1.1 1.1 1.1) segment=humerus_l apply=true
      Scale: scales=(1.1 1.1 1.1) segment=ulna_l apply=true
      Scale: scales=(1.1 1.1 1.1) segment=radius_l apply=true
      Scale: scales=(1.1 1.1 1.1) segment=hand_l apply=true
  MarkerPlacer:
    apply: false
    time_range: -1 -1
    max_marker_movement: -1
